# LAMMPS input file for phagocytosis simulation, written by Shuo Wang, 2024

variable	P_damp  equal  1												# Sets the Pressure damping variable used in the following " fix npt" commands
variable	P  equal  0.05													# Sets the desired pressure of the system used in the following " fix npt" commands
variable	ini_T  equal  0.02												# Sets the initial temperature used in the fix commands below
variable	T  equal  0.23													# Sets the final temperature used in the fix commands below
variable	LD equal  1.0													# Sets the temperature damping parameter used in fix commands below
variable	seed equal  14524775											# Sets the seed number used in dpd/morse pair and fix filopodia/target commands below

# Parameters for the fluidmembrane pair-wise interactions
variable	epsilon  equal 1.0
variable	sigma  equal 1.0
variable	rcut  equal 2.6
variable	zeta  equal 4
variable	mu0  equal 3
variable	beta  equal 0.0

# Parameters for the dpd/morse pair-wise interactions
variable     aij  equal 6.0
variable     gamma  equal 15.0
variable     D0_pre  equal 0.01
variable     D0  equal 0.1
variable     aij_skeleton  equal 15.0

# Parameters for the harmonic bonds between cytoskeletal beads and transmembrane proteins
variable     k_harmonic  equal 10.0
variable     r0_harmonic  equal 1.5

# Simulation setup
units		lj
atom_style	hybrid ellipsoid peri molecular

boundary	p p p

read_data	Dves_100_extra_area_20p_Dskele_3_inner_layer_box_200X200X200_NP_r5.data                                           # Specifies which read data file will be used to read in initial coordinates of system

mass		*          1.0
set type	1 shape  1 1 1

special_bonds	lj 1.0 1.0 1.0

neighbor	1.0 multi
comm_modify	vel yes mode multi cutoff/multi 1 3.6 cutoff/multi 2 3.6 cutoff/multi 3 3.6 cutoff/multi 4 3.6 cutoff/multi 5 25

# Group setup
group		bilayer  type 1 4
group		skeleton  type 5
group		tobond  type 4 5
group		cell  type 1 4 5
group		water_in  type 2
group		water_out type 3
group		water   type 2 3
group		NP type 6
group		nowater type 1 4 5 6
group		noout type 1 2 4 5 6

# Initial velocity
velocity	nowater create ${T} 87287 loop geom
velocity	water create ${T} 87287 loop geom

# Bond setup
bond_style      hybrid harmonic wlc/pow/all/visc
bond_coeff      1 harmonic ${k_harmonic} ${r0_harmonic}						# Bonds between the cytoskeletal beads and the transmembrane proteins
bond_coeff      2 wlc/pow/all/visc 0.23 2.2  33.60215 2.0 0 0 1				# Bonds between the cytoskeletal beads
bond_coeff      3 wlc/pow/all/visc 0.23 2.2  16.129 2.0 0 0 1				# Bonds between the target beads

# Angle setup
angle_style     hybrid area/volume harmonic
angle_coeff     1 area/volume 793.215 2144.4768 202.35 6016.0768 16.129		# Angles that constrain the area and volume of the target particle

# Dihedral setup
dihedral_style  bend
dihedral_coeff  1 5.312														# Dihedrals between the triangles on the target particle surface

# Pair setup
pair_style		hybrid	dpd/morse ${T} 3.6 ${seed}	fluidvismembrane ${T} 2.6 ${seed}
pair_coeff		1		1		fluidvismembrane	${epsilon}		${sigma}	${rcut}	${zeta}				${mu0}				${beta}	0
pair_coeff		1		2*3		dpd/morse			${aij}			${gamma}	2.7		3.6					0					0.5		0.5
pair_coeff		2*3		2*3		dpd/morse			${aij}			${gamma}	2.7		3.6					0					0.5		0.5
pair_coeff		1		4		fluidvismembrane	2				${sigma}	${rcut}	${zeta}				${mu0}				${beta}	15
pair_coeff		2*3		4		dpd/morse			${aij}			${gamma}	2.7		3.6					0					0.5		0.5
pair_coeff		4		4		fluidvismembrane	${epsilon}		${sigma}	${rcut}	${zeta}				${mu0}				${beta}	0
pair_coeff		1		5		dpd/morse			${aij_skeleton}	${gamma}	2.7		3.6					0					0.5		0.5
pair_coeff		2*3		5		dpd/morse			${aij}			${gamma}	2.7		3.6					0					0.5		0.5
pair_coeff		4		5		dpd/morse			${aij_skeleton}	${gamma}	2.7		3.6					0					0.5		0.5
pair_coeff		5		5		dpd/morse			${aij}			${gamma}	2.7		3.6					0					0.5		0.5
pair_coeff		1		6		dpd/morse			0				${gamma}	2.7		3.6					${D0_pre}			0.5		0.5
pair_coeff		2*3		6		dpd/morse			${aij}			${gamma}	2.7		3.6					0					0.5		0.5
pair_coeff		4		6		dpd/morse			0				${gamma}	2.7		3.6					${D0_pre}			0.5		0.5
pair_coeff		5		6		dpd/morse			${aij}			${gamma}	2.7		3.6					0					0.5		0.5
pair_coeff		6		6		dpd/morse			0				${gamma}	2.7		3.6					0					0.5		0.5

# Output of the thermodynamic data
thermo_style	custom step temp press ebond
thermo			200

# Timestep setup
timestep		0.005

# Output of the trajectory of the system except the outer water
dump			1 noout atom 5000  dump_noout.lammpstrj

# Output of the cytoskeletal bonds
compute			b1 tobond property/local btype batom1 batom2
dump			b3 cell local 5000 skeleton_bond.txt c_b1[1] c_b1[2] c_b1[3]

#### Equilibrium
fix				1 water npt temp ${T} ${T} ${LD} iso ${P} ${P} ${LD}
run				10000

fix				789 skeleton npt temp ${ini_T} ${T} ${LD} iso ${P} ${P} ${P_damp}
fix				2 bilayer nvt/asphere temp ${T} ${T} ${LD}
fix				22 NP rigid/nvt single temp ${T} ${T} ${LD}

# Output of the energy of the interaction between the target and the membrane
compute			e1 NP group/group bilayer
fix				e2 all ave/time 10 5 100 c_e1 c_e1[1] c_e1[2] c_e1[3] file Mem_Target.interaction


# Commands that controls the breakage of the cytoskeletal bonds. The meanings of the parameters are:
#                                        Nevery    break_bond_type   target_group   r_break   transmem_bond_type   added_group
fix				333 skeleton skele/break   100            2               NP          3.6             1            added_group broken partly intact

run				20000

#### Phagocytosis
# Commands that controls the area modification of the membrane. The meanings of the parameters are:
#                                    nevery   lipid_type   d_cut   d_break   angle_min   r_detect   d_Bezier   near_num_limit   angle_near_min max_insert_number  velocity_flag
fix				a1 bilayer addlipid    1          1         2.0      3.6        0.4        1.1         1.1            2               0.6        number 50000     velocity yes

pair_coeff		1		6		dpd/morse			0				${gamma}	2.7		3.6					${D0}				0.5		0.5

# Commands that controls the protrusive forces. The meanings of the parameters are:
#                                                  applied_group  force   bond_prt_type   bystep   Ndiv   finalstep   around   R_around
fix				active bilayer protrusiveskeleton     partly       60          1          bystep    20      200000    around      2.6

run				290000

unfix			active

run				710000
